# Buck-converter 5V
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I_O := 1 A
U_O := 5 V
U_DC := 16 V
U_D := 0.7 V  # Er det diodespændingsfaldet????!!!!!!! Ja det er den, men 0.7 er ikke normalt for shottky dioder tror jeg
L := 940 μH
C_Diode := 8*10^-12 F
C_Spole := 3.9 μF  # måske
C_DG := □  # error: Missing term or expression.
C_DS := □  # error: Missing term or expression.
C_T := C_DG + C_DS + C_Diode + C_Spole  # error: This variable is undefined. Check that the label is set correctly.
C_T := 10 nF  # Antaget (så passer det ud fra spolen)
# Duty-cycle
D := (U_O + U_D)/(U_DC + U_D) = 0.341317
# Frekvens ud fra spole
f_OSC := L == 100*(U_DC - U_O)*D/(I_O*f_OSC)  # error: This variable is undefined. Check that the label is set correctly.
# To spoler i serie af 470 microH
940*10^-6 == 100*(16 - 5)*0.341/(1*f) solve, f → 399042.553191
f_osc := 400 kHz
f_osc_max := 1 A/(50*10*10^-9 F*5 V) = 400 kHz
# Kondensatorværdier
C_1_min := 100*D*I_O/(U_DC*f_osc) = 5.33308 μF
# R_ESR for kondensator
C_2_min := 100*D*I_O/(U_O*f_osc) = 17.0659 μF
R_ESR1_min := U_O/(100*I_O) = 0.05 Ω
# Buck-converter 12V
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I_O := 2 A
U_O := 12 V
U_DC := 16 V
U_D := 0.7 V
L := 470 μH
C_Diode := 8*10^-12 F
C_Spole := □  # error: Missing term or expression.
C_DG := □  # error: Missing term or expression.
C_DS := □  # error: Missing term or expression.
C_T := C_DG + C_DS + C_Diode + C_Spole  # error: This variable is undefined. Check that the label is set correctly.
C_T := 10 nF  # Antaget (så passer det ud fra spolen)
# Duty-cycle
D := (U_O + U_D)/(U_DC + U_D) = 0.760479
# Frekvens ud fra spole
f_OSC := L == 100*(U_DC - U_O)*D/(I_O*f_OSC)  # error: This variable is undefined. Check that the label is set correctly.
470*10^-6 == 100*(16 - 12)*0.76/(2*f) solve, f → 323404.255319
f_osc := 330 kHz
f_osc_max := 2 A/(50*10*10^-9 F*12 V) = 333.333 kHz
# Kondensatorværdier
C_1_min := 100*D*I_O/(U_DC*f_osc) = 28.806 μF
# R_ESR for kondensator
C_2_min := 100*D*I_O/(U_O*f_osc) = 38.408 μF
R_ESR1_min := U_O/(100*I_O) = 0.06 Ω
