# Timer til power-supply
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f_555 := 1.44/((R_A + 2*R_B)*C)  # error: This variable is undefined. Check that the label is set correctly.
duty := t_H/(t_H + t_L) == 1 - R_B/(R_A + 2*R_B)  # error: This variable is undefined. Check that the label is set correctly.
t_H := 0.963*(R_A + R_B)*C  # error: This variable is undefined. Check that the label is set correctly.
t_L := 0.963*R_B*C  # error: This variable is undefined. Check that the label is set correctly.
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f := 100 kHz
C := 0.001 μF = 1 nF
R_B := 3900 Ω
R_A := R_A + 2*R_B == 10*10^3*Ω solve, R_A → 2200*Ω
duty := 1 - R_B/(R_A + 2*R_B) = 0.61
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